*Heading
** Job name: Dam_plane Model name: Model-1
** Generated by: Abaqus/CAE 2022
*Preprint, echo=NO, model=NO, history=NO, contact=NO
**
** PARTS
**
*Part, name=Part-1

Координаты

*Node
      1,   5.05000019,   31.1499996
      2,   5.05000019,   33.6499977
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*Element, type=DC2D3
  1, 316,  83, 312
  2, 296, 290, 242
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*Nset, nset=Concrete-1 задать коэффициенты теплопроводности для первого материала
   1,   2,   3,   4,   5,   6
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*Elset, elset=Concrete-1, generate
   1,  688,    1
*Nset, nset=Concrete-2 узлы 2ого материала
   9,  10,  27,  37,  38,  39
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*Elset, elset=Concrete-2, generate
  689,  1093,     1
*Nset, nset=T_water
  13,  14,  75,  76,  77,  78
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*Nset, nset=T_air
  10,  11,  12,  27,  58,  59
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*Nset, nset=T_gallery
   1,   2,   3,   4,   5,   6
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*End Part
**
**
** ASSEMBLY
**
*Assembly, name=Assembly
**
*Instance, name=Part-1-1, part=Part-1
*End Instance
**
*End Assembly
** ----------------------------------------------------------------
**
** STEP: Step-1
**
*Step, name=Step-1, nlgeom=NO
*Static
1., 1., 1e-05, 1.
**
** OUTPUT REQUESTS
**
*Restart, write, frequency=0
**
** FIELD OUTPUT: F-Output-1
**
*Output, field, variable=PRESELECT
**
** HISTORY OUTPUT: H-Output-1
**
*Output, history, variable=PRESELECT
*End Step
